**
**   Structure: corner crack specimen.
**   Test objective: crack propagation; intersection length.
**
*NODE, NSET=Nall
       1,-2.000000000000e-01,-1.000000000000e-01,2.000000000000e+00
       2,-6.000000000000e-02,-1.000000000000e-01,2.000000000000e+00
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*ELEMENT, TYPE=S3, ELSET=Eshell
     1,     1,      2,      3
     2,     3,      2,      4
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*ELEMENT, TYPE=C3D20, ELSET=Evol
    81,    56,    57,    58,    59,    60,    61,    62,    63,    64,    65,
          66,    67,    72,    73,    74,    75,    68,    69,    70,    71
    82,    59,    58,    76,    77,    63,    62,    78,    79,    66,    80,
          81,    82,    74,    85,    86,    87,    71,    70,    83,    84
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** Names based on fix
*NSET,NSET=Nfix
56,
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*BOUNDARY
Nfix,1,3
*MATERIAL,NAME=CT3D_BENCHMARK
*ELASTIC,TYPE=ISO
210899,0.3142,293.15
210507,0.3142,300.15
209607,0.3152,350.15
207407,0.3162,400.15
205807,0.3172,450.15
*DENSITY
7.91e-09
*EXPANSION,ZERO=293.15
8.9e-06,223.15
9.9e-06,300.15
1.7e-05,1373.15
*MATERIAL,NAME=CRACK
*USER MATERIAL,CONSTANTS=7
1.E-4,772.86,3.1,10.,177.09,10.,3162.
*SOLID SECTION,ELSET=Evol,MATERIAL= CT3D_BENCHMARK
*SHELL SECTION,ELSET=Eshell,MATERIAL= CT3D_BENCHMARK
.01
*STEP,INC=10
*CRACK PROPAGATION,INPUT=masterII.frd,MATERIAL=CRACK,LENGTH=INTERSECTION
0.05,10.
*NODE FILE
KEQ
*END STEP
