**
**   Structure: disk segment
**   Test objective: cyclic symmetry
**                   output of two sectors
**   The first four eigenfrequencies correspond to
**   rigid body modes. They are small compared to
**   the other eigenfrequencies, however, their values
**   highly depend on the computer system
**
*HEADING
Model: segment
*NODE, NSET=Nall
       1,  1.00000e-01,  1.00000e+00, -3.72529e-09
       2,  1.00000e-01,  9.25000e-01, -3.72529e-09
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*ELEMENT, TYPE=C3D20, ELSET=Eall
     1,     1,     2,     3,     4,     5,     6,     7,     8,     9,    10,
          11,    12,    17,    18,    19,    20,    13,    14,    15,    16
     2,     2,    21,    22,     3,     6,    23,    24,     7,    25,    26,
          27,    10,    30,    31,    32,    18,    14,    28,    29,    15
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*MATERIAL,NAME=EL
*ELASTIC
210000.,.3
*DENSITY
7.8E-9
*SOLID SECTION,ELSET=Eall,MATERIAL=EL
*NSET,NSET=Nleft
1,
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*NSET,NSET=Nright
523,
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*SURFACE,NAME=left,TYPE=NODE
Nleft
*SURFACE,NAME=right,TYPE=NODE
Nright
*TIE,CYCLIC SYMMETRY,POSITION TOLERANCE=1.,NAME=T1
left,right
*CYCLIC SYMMETRY MODEL,N=12,NGRAPH=1
0.,0.,0.,1.,0.,0.
*INITIAL CONDITIONS,TYPE=TEMPERATURE
*NSET,NSET=STRESSDOMAIN
Nall
*STEP
*FREQUENCY
10
*SELECT CYCLIC SYMMETRY MODES,NMIN=2,NMAX=2
***NODE FILE
**U,PU
***EL FILE
**S,PHS,ENER,NOE,MAXS
*EL FILE
MAXS
*END STEP
